# OpenSim document version 40500
ForceSet:
  CoordinateActuator pelvis_tilt: coordinate=pelvis_tilt optimal_force=1
  CoordinateActuator pelvis_list: coordinate=pelvis_list optimal_force=1
  CoordinateActuator pelvis_rotation: coordinate=pelvis_rotation optimal_force=1
  CoordinateActuator pelvis_tx: coordinate=pelvis_tx optimal_force=1
  CoordinateActuator pelvis_ty: coordinate=pelvis_ty optimal_force=1
  CoordinateActuator pelvis_tz: coordinate=pelvis_tz optimal_force=1
  CoordinateActuator hip_flexion_r: coordinate=hip_flexion_r optimal_force=1
  CoordinateActuator hip_adduction_r: coordinate=hip_adduction_r optimal_force=1
  CoordinateActuator hip_rotation_r: coordinate=hip_rotation_r optimal_force=1
  CoordinateActuator knee_angle_r: coordinate=knee_angle_r optimal_force=1
  CoordinateActuator ankle_angle_r: coordinate=ankle_angle_r optimal_force=1
  CoordinateActuator subtalar_angle_r: coordinate=subtalar_angle_r optimal_force=1
  CoordinateActuator hip_flexion_l: coordinate=hip_flexion_l optimal_force=1
  CoordinateActuator hip_adduction_l: coordinate=hip_adduction_l optimal_force=1
  CoordinateActuator hip_rotation_l: coordinate=hip_rotation_l optimal_force=1
  CoordinateActuator knee_angle_l: coordinate=knee_angle_l optimal_force=1
  CoordinateActuator ankle_angle_l: coordinate=ankle_angle_l optimal_force=1
  CoordinateActuator subtalar_angle_l: coordinate=subtalar_angle_l optimal_force=1
  CoordinateActuator lumbar_extension: coordinate=lumbar_extension optimal_force=1
  CoordinateActuator lumbar_bending: coordinate=lumbar_bending optimal_force=1
  CoordinateActuator lumbar_rotation: coordinate=lumbar_rotation optimal_force=1
