# OpenSim document version 40500
AnalyzeTool s01rra:
  model_file: RRA/RRA1/HopFullBodyLaiArnold_scaled01.osim
  replace_force_set: false
  force_set_files: RRA/RRA1/HopFullBodyLaiArnold_scaled01_actuators.xml
  results_directory: Results/output
  output_precision: 8
  initial_time: 0.005
  final_time: 5
  solve_for_equilibrium_for_auxiliary_states: true
  maximum_number_of_integrator_steps: 20000
  maximum_integrator_step_size: 1
  minimum_integrator_step_size: 1e-8
  integrator_error_tolerance: 1e-5
  external_loads_file: C:/Users/wzy/Desktop/Dissertation/test03/files/Subject01/Session02/../../SetupTemplates/external_loads.xml
  coordinates_file: Results/IK_results_s01s2.mot
  lowpass_cutoff_frequency_for_coordinates: 6
  AnalysisSet Analyses:
    JointReaction: start_time=0.005 end_time=5 step_interval=1 in_degrees=true
        forces_file=C:\Users\wzy\Desktop\Dissertation\test03\files\Subject01\Session02\Results\output\s01rra_StaticOptimization_force.sto
        joint_names=hip_r apply_on_bodies=child express_in_frame=ground
  ControllerSet Controllers:
    ControlSetController: controls_file=Results/output/s01rra_StaticOptimization_controls.xml
