# OpenSim document version 40500
AnalyzeTool s05rra:
  replace_force_set: false
  force_set_files: ../Session01/RRA/RRA1/HopFullBodyLaiArnold_scaled05rra_actuators.xml
  results_directory: C:/Users/wzy/Desktop/Dissertation/test03/files/Subject05/setup/../Session01/output
  output_precision: 8
  initial_time: 0.005
  final_time: 5
  solve_for_equilibrium_for_auxiliary_states: false
  maximum_number_of_integrator_steps: 20000
  maximum_integrator_step_size: 1
  minimum_integrator_step_size: 1e-8
  integrator_error_tolerance: 1e-5
  external_loads_file: s05_external_loads.xml
  coordinates_file: C:/Users/wzy/Desktop/Dissertation/test03/files/Subject05/setup/../Session01/output/s05_ik_results.mot
  lowpass_cutoff_frequency_for_coordinates: 6
  AnalysisSet Analyses:
    StaticOptimization: start_time=0.005 end_time=5 step_interval=1 in_degrees=true use_model_force_set=true
        activation_exponent=2 use_muscle_physiology=true optimizer_convergence_criterion=0.0001
        optimizer_max_iterations=100
