# OpenSim document version 40500
ScaleTool s01:
  mass: 65.31 [kg]
  height: -1
  age: -1
  ModelScaler:
    apply: true
    scaling_order: measurements
    marker_file: ../Session01/StaticData/static.trc
    time_range: 0.005 1.965
    preserve_mass_distribution: true
    MeasurementSet:
      Measurement pelvis_width: apply=true
        MarkerPair: markers=(RASI LASI)
        MarkerPair: markers=(RPSI LPSI)
        BodyScale pelvis: axes=Z
      Measurement pelvis_depth: apply=true
        MarkerPair: markers=(RASI RPSI)
        MarkerPair: markers=(LASI LPSI)
        BodyScale pelvis: axes=X
      Measurement pelvis_height: apply=true
        MarkerPair: markers=(RASI HIPR)
        MarkerPair: markers=(LASI HIPL)
        BodyScale pelvis: axes=Y
      Measurement femur_length: apply=true
        MarkerPair: markers=(RASI RLKN)
        MarkerPair: markers=(RASI RMKN)
        BodyScale femur_r: axes=Y
        BodyScale patella_r: axes=Y
        BodyScale patella_l: axes=Y
      Measurement femur_widthdepth: apply=true
        MarkerPair: markers=(RLKN RMKN)
        BodyScale femur_r: axes=(X Z)
        BodyScale patella_r: axes=(X Z)
        BodyScale patella_l: axes=(X Z)
      Measurement tibia_length: apply=true
        MarkerPair: markers=(RLKN RLMAL)
        MarkerPair: markers=(RMKN RMMAL)
        BodyScale tibia_r: axes=Y
      Measurement tibia_widthdepth: apply=true
        MarkerPair: markers=(RMMAL RLMAL)
        BodyScale tibia_r: axes=(X Z)
      Measurement foot_length: apply=true
        MarkerPair: markers=(RHEEL RTOE)
        BodyScale talus_r: axes=X
        BodyScale calcn_r: axes=X
        BodyScale toes_r: axes=X
      Measurement foot_width: apply=true
        MarkerPair: markers=(RMET5 RMET1)
        BodyScale talus_r: axes=Z
        BodyScale calcn_r: axes=Z
        BodyScale toes_r: axes=Z
      Measurement foot_depth: apply=true
        MarkerPair: markers=(RMMAL RHEEL)
        MarkerPair: markers=(RLMAL RHEEL)
        BodyScale talus_r: axes=Y
        BodyScale calcn_r: axes=Y
        BodyScale toes_r: axes=Y
      Measurement torso_width: apply=true
        MarkerPair: markers=(RSH LSH)
        MarkerPair: markers=(RASI LASI)
        BodyScale torso: axes=Z
      Measurement torso_height: apply=true
        MarkerPair: markers=(RASI RSH)
        MarkerPair: markers=(LASI LSH)
        BodyScale torso: axes=Y
      Measurement torso_depth: apply=true
        MarkerPair: markers=(MAN C7)
        BodyScale torso: axes=X
      Measurement l_femur_length: apply=true
        MarkerPair: markers=(LASI LLKN)
        MarkerPair: markers=(LASI LMKN)
        BodyScale femur_l: axes=Y
      Measurement l_femur_widthdepth: apply=true
        MarkerPair: markers=(LLKN LMKN)
        BodyScale femur_l: axes=(X Z)
      Measurement l_tibia_length: apply=true
        MarkerPair: markers=(LLKN LLMAL)
        MarkerPair: markers=(LMKN LHEEL)
        BodyScale tibia_l: axes=Y
      Measurement l_tibia_widthdepth: apply=true
        MarkerPair: markers=(LLMAL LMMAL)
        BodyScale tibia_l: axes=(X Z)
      Measurement l_foot_length: apply=true
        MarkerPair: markers=(LHEEL LTOE)
        BodyScale talus_l: axes=X
        BodyScale calcn_l: axes=X
        BodyScale toes_l: axes=X
      Measurement l_foot_width: apply=true
        MarkerPair: markers=(LMET5 LMET1)
        BodyScale talus_l: axes=Z
        BodyScale calcn_l: axes=Z
        BodyScale toes_l: axes=Z
      Measurement l_foot_depth: apply=true
        MarkerPair: markers=(LMMAL LHEEL)
        MarkerPair: markers=(LLMAL LHEEL)
        BodyScale talus_l: axes=Y
        BodyScale calcn_l: axes=Y
        BodyScale toes_l: axes=Y
  MarkerPlacer:
    apply: true
    marker_file: ../Session01/StaticData/static.trc
    time_range: 0.005 0.2
    max_marker_movement: -1
    IKTaskSet:
      IKMarkerTask C7: apply=true weight=1
      IKMarkerTask MAN: apply=true weight=7
      IKMarkerTask RSH: apply=true weight=1
      IKMarkerTask LSH: apply=true weight=1
      IKMarkerTask RASI: apply=true weight=10
      IKMarkerTask LASI: apply=true weight=10
      IKMarkerTask RPSI: apply=true weight=4
      IKMarkerTask LPSI: apply=true weight=4
      IKMarkerTask HIPL: apply=true weight=1
      IKMarkerTask HIPR: apply=true weight=1
      IKMarkerTask RLKN: apply=true weight=1
      IKMarkerTask RMKN: apply=true weight=1
      IKMarkerTask RLMAL: apply=true weight=1
      IKMarkerTask RMMAL: apply=true weight=1
      IKMarkerTask RHEEL: apply=true weight=6
      IKMarkerTask RMET5: apply=true weight=1
      IKMarkerTask RMET1: apply=true weight=2
      IKMarkerTask RTOE: apply=true weight=1
      IKMarkerTask LLKN: apply=true weight=1
      IKMarkerTask LMKN: apply=true weight=1
      IKMarkerTask LLMAL: apply=true weight=1
      IKMarkerTask LMMAL: apply=true weight=1
      IKMarkerTask LHEEL: apply=true weight=6
      IKMarkerTask LMET5: apply=true weight=1
      IKMarkerTask LMET1: apply=true weight=2
      IKMarkerTask LTOE: apply=true weight=1
