# OpenSim document version 40500
ForceSet:
  PointActuator FX: body=pelvis point=(-0.0602424 0 -0.0257426) direction=(1 0 0) optimal_force=10
  PointActuator FY: body=pelvis point=(-0.0602424 0 -0.0257426) direction=(0 1 0) optimal_force=10
  PointActuator FZ: body=pelvis point=(-0.0602424 0 -0.0257426) direction=(0 0 1) optimal_force=10
  TorqueActuator MX: bodyA=pelvis bodyB=ground axis=(1 0 0) optimal_force=10
  TorqueActuator MY: bodyA=pelvis bodyB=ground axis=(0 1 0) optimal_force=10
  TorqueActuator MZ: bodyA=pelvis bodyB=ground axis=(0 0 1) optimal_force=10
  CoordinateActuator pelvis_tilt: coordinate=pelvis_tilt optimal_force=10
  CoordinateActuator pelvis_list: coordinate=pelvis_list optimal_force=10
  CoordinateActuator pelvis_rotation: coordinate=pelvis_rotation optimal_force=10
  CoordinateActuator pelvis_tx: coordinate=pelvis_tx optimal_force=10
  CoordinateActuator pelvis_ty: coordinate=pelvis_ty optimal_force=10
  CoordinateActuator pelvis_tz: coordinate=pelvis_tz optimal_force=10
  CoordinateActuator hip_flexion_r: coordinate=hip_flexion_r optimal_force=10
  CoordinateActuator hip_adduction_r: coordinate=hip_adduction_r optimal_force=10
  CoordinateActuator hip_rotation_r: coordinate=hip_rotation_r optimal_force=10
  CoordinateActuator knee_angle_r: coordinate=knee_angle_r optimal_force=10
  CoordinateActuator ankle_angle_r: coordinate=ankle_angle_r optimal_force=10
  CoordinateActuator hip_flexion_l: coordinate=hip_flexion_l optimal_force=10
  CoordinateActuator hip_adduction_l: coordinate=hip_adduction_l optimal_force=10
  CoordinateActuator hip_rotation_l: coordinate=hip_rotation_l optimal_force=10
  CoordinateActuator knee_angle_l: coordinate=knee_angle_l optimal_force=10
  CoordinateActuator ankle_angle_l: coordinate=ankle_angle_l optimal_force=10
  CoordinateActuator lumbar_extension: coordinate=lumbar_extension optimal_force=10
  CoordinateActuator lumbar_bending: coordinate=lumbar_bending optimal_force=10
  CoordinateActuator lumbar_rotation: coordinate=lumbar_rotation optimal_force=10
