# OpenSim document version 40500
InverseKinematicsTool:
  results_directory: ./
  constraint_weight: Inf
  accuracy: 1e-8
  time_range: 0.005 5
  output_motion_file: C:\Users\wzy\Desktop\Dissertation\test03\files\Subject06\Session02\outputs\s06_ik_results.mot
  report_errors: true
  marker_file: ../DynamicData/1.8Hz3min.trc
  report_marker_locations: false
  IKTaskSet:
    IKMarkerTask C7: apply=true weight=1
    IKMarkerTask MAN: apply=true weight=1
    IKMarkerTask RSH: apply=true weight=1
    IKMarkerTask LSH: apply=true weight=1
    IKMarkerTask RASI: apply=true weight=2
    IKMarkerTask LASI: apply=true weight=2
    IKMarkerTask RPSI: apply=true weight=1
    IKMarkerTask LPSI: apply=true weight=1
    IKMarkerTask COX: apply=false weight=1
    IKMarkerTask RTHI1: apply=true weight=4
    IKMarkerTask RTHI2: apply=true weight=4
    IKMarkerTask RTHI3: apply=true weight=4
    IKMarkerTask RTHI4: apply=true weight=4
    IKMarkerTask RSHA1: apply=true weight=4
    IKMarkerTask RSHA2: apply=true weight=4
    IKMarkerTask RSHA3: apply=true weight=4
    IKMarkerTask RSHA4: apply=true weight=4
    IKMarkerTask RHEEL: apply=true weight=5
    IKMarkerTask RMET5: apply=true weight=1
    IKMarkerTask RMET1: apply=true weight=1
    IKMarkerTask RTOE: apply=false weight=1
    IKMarkerTask LTHI1: apply=true weight=4
    IKMarkerTask LTHI2: apply=true weight=4
    IKMarkerTask LTHI3: apply=true weight=4
    IKMarkerTask LTHI4: apply=true weight=4
    IKMarkerTask LSHA1: apply=true weight=4
    IKMarkerTask LSHA2: apply=true weight=4
    IKMarkerTask LSHA3: apply=true weight=4
    IKMarkerTask LSHA4: apply=true weight=4
    IKMarkerTask LHEEL: apply=true weight=5
    IKMarkerTask LMET5: apply=true weight=1
    IKMarkerTask LMET1: apply=true weight=1
    IKMarkerTask LTOE: apply=false weight=1
