# OpenSim document version 40500
AnalyzeTool s06rra:
  model_file: ../../../Subject01/Session02/RRA/RRA1/HopFullBodyLaiArnold_scaled01.osim
  replace_force_set: false
  force_set_files: ../RRA/RRA1/HopFullBodyLaiArnold_scaled06rra_actuators.xml
  results_directory: ../outputs
  output_precision: 8
  initial_time: 0.005
  final_time: 5
  solve_for_equilibrium_for_auxiliary_states: true
  maximum_number_of_integrator_steps: 20000
  maximum_integrator_step_size: 1
  minimum_integrator_step_size: 1e-8
  integrator_error_tolerance: 1e-5
  external_loads_file: external_loads.xml
  coordinates_file: ../outputs/s06_ik_results.mot
  lowpass_cutoff_frequency_for_coordinates: 6
  AnalysisSet Analyses:
    JointReaction: start_time=0.005 end_time=5 step_interval=1 in_degrees=true
        forces_file=C:\Users\wzy\Desktop\Dissertation\test03\files\Subject06\Session02\outputs\s06rra_StaticOptimization_force.sto
        joint_names=hip_r apply_on_bodies=child express_in_frame=parent
  ControllerSet Controllers:
    ControlSetController: controls_file=../outputs/s06rra_StaticOptimization_controls.xml
