# OpenSim document version 40500
MarkerSet:
  Marker C7: torso (-0.1058413 0.4355896 0.00102168)
  Marker MAN: torso (0.05440323 0.3910042 -0.002839206)
  Marker RSH: torso (-0.01402397 0.4100022 0.2006674)
  Marker LSH: torso (-0.01593647 0.4159142 -0.2003121)
  Marker RASI: pelvis (0.01264405 0.01535576 0.1225543)
  Marker LASI: pelvis (0.01818505 0.02382591 -0.123812)
  Marker RPSI: pelvis (-0.1635861 0.05646079 0.03289851)
  Marker LPSI: pelvis (-0.1622518 0.05792159 -0.02891736)
  Marker HIPL: pelvis (-0.06833155 0.07499817 -0.1697177)
  Marker HIPR: pelvis (-0.06480673 0.06646444 0.1694305)
  Marker COX: pelvis (-0.1612837 0.05754168 0.000152473)
  Marker RTHI1: femur_r (0.007361311 -0.1388756 0.1209424)
  Marker RTHI2: femur_r (0.00969946 -0.1999859 0.1158521)
  Marker RTHI3: femur_r (0.08083407 -0.1883107 0.1066657)
  Marker RTHI4: femur_r (0.07128063 -0.1297127 0.1117478)
  Marker RLKN: femur_r (-0.01939982 -0.4100412 0.07899804)
  Marker RMKN: femur_r (-0.008161092 -0.4191189 -0.05528835)
  Marker RSHA1: tibia_r (-0.05292805 -0.2669154 0.07593574)
  Marker RSHA2: tibia_r (-0.05747353 -0.3049232 0.06419073)
  Marker RSHA3: tibia_r (0.001869657 -0.3075287 0.05915327)
  Marker RSHA4: tibia_r (0.004265299 -0.2689049 0.06982483)
  Marker RLMAL: tibia_r (-0.03415618 -0.432601 0.04567214)
  Marker RMMAL: tibia_r (-0.003597154 -0.4172892 -0.0385914)
  Marker RHEEL: calcn_r (-0.02429451 0.02102058 -0.001494592)
  Marker RMET5: calcn_r (0.155714 -0.0008899632 0.05045164)
  Marker RMET1: calcn_r (0.1915777 0.02930548 -0.0318099)
  Marker RTOE: calcn_r (0.224849 0.01570078 -0.03439073)
  Marker LTHI1: femur_l (-0.03371163 -0.1531366 -0.1126045)
  Marker LTHI2: femur_l (-0.02425756 -0.2109003 -0.1007448)
  Marker LTHI3: femur_l (0.04665404 -0.1997506 -0.1140584)
  Marker LTHI4: femur_l (0.02841014 -0.1414874 -0.125202)
  Marker LLKN: femur_l (-0.01497859 -0.4221563 -0.07497277)
  Marker LMKN: femur_l (-0.01029604 -0.4307753 0.05004967)
  Marker LSHA1: tibia_l (-0.05994161 -0.2685425 -0.05941658)
  Marker LSHA2: tibia_l (-0.06241036 -0.3079649 -0.04901401)
  Marker LSHA3: tibia_l (-0.0004315521 -0.3071914 -0.05342992)
  Marker LSHA4: tibia_l (-0.006596395 -0.2646326 -0.06531272)
  Marker LLMAL: tibia_l (-0.01835462 -0.4143191 -0.04493857)
  Marker LMMAL: tibia_l (-0.01179831 -0.3997024 0.04521878)
  Marker LHEEL: calcn_l (-0.02497206 0.01561625 0.006904729)
  Marker LMET5: calcn_l (0.1535032 0.003466863 -0.05124708)
  Marker LMET1: calcn_l (0.1899256 0.0260337 0.02912334)
  Marker LTOE: calcn_l (0.2222567 0.01338415 0.02702249)
